!------------------------------------------------------------------------------------
! This script runs the IEEE 34 Bus test case (Mod 1)
!------------------------------------------------------------------------------------

! change the path name to match where it is actually installed on your computer

Compile ieee34Mod1_no_reg.dss

New Energymeter.M1  Line.L1  1

Batchedit RegControl..* maxtapchange=0

Redirect Pvsystem.dss

!solve
!Buscoords IEEE34_BusXY.csv

!Show voltage LN Nodes
!Show currents element
!show powers kva element
!show taps
